*Heading
** Job name: TestVSI-Tets2 Model name: Model-2
** Generated by: Abaqus/CAE 2022
*Preprint, echo=NO, model=NO, history=NO, contact=NO
**
** PARTS
**
*Part, name=Cube
*Node
      1,           5.,           0.,           5.
      2,           0.,           0.,           5.
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*Element, type=C3D4
   1,  603,  604,  605,  606
   2,  603,  607,  608,  609
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*Nset, nset=Cube, generate
    1,  1455,     1
*Elset, elset=Cube, generate
    1,  6803,     1
** Section: Cube
*Solid Section, elset=Cube, material="Linear Elastic"
,
*End Part
**
**
** ASSEMBLY
**
*Assembly, name=Assembly
**
*Instance, name=Cube-1, part=Cube
*End Instance
**
*Nset, nset=BottomFace, instance=Cube-1
   1,   2,   3,   4,   9,  10
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*Elset, elset=BottomFace, instance=Cube-1
  120,  121,  185,  427,  500,  535
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*Nset, nset=Corner1, instance=Cube-1
 2,
*Nset, nset=Corner2, instance=Cube-1
 4,
*Nset, nset=TopFace, instance=Cube-1
   5,   6,   7,   8,  54,  55
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*Elset, elset=TopFace, instance=Cube-1
  114,  140,  171,  404,  434,  525
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*Nset, nset=XMAX, instance=Cube-1
   1,   4,   7,   8,  36,  37
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*Elset, elset=XMAX, instance=Cube-1
  138,  192,  483,  692,  694, 1194
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*Nset, nset=XMIN, instance=Cube-1
   2,   3,   5,   6,  18,  19
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*Elset, elset=XMIN, instance=Cube-1
   47,  180,  222,  717,  809, 1035
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*Nset, nset=ZMAX, instance=Cube-1
   1,   2,   5,   8,   9,  10
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*Elset, elset=ZMAX, instance=Cube-1
  298,  734,  955, 1461, 1494, 1686
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*Nset, nset=ZMIN, instance=Cube-1
   3,   4,   6,   7,  27,  28
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*Elset, elset=ZMIN, instance=Cube-1
   27,  178,  261,  266,  337, 1206
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*End Assembly
**
** MATERIALS
**
*Material, name="Linear Elastic"
*Elastic
10., 0.3
** ----------------------------------------------------------------
**
** STEP: Compression
**
*Step, name=Compression, nlgeom=NO, inc=10000
*Static
0.01, 1., 1e-09, 0.1
**
** BOUNDARY CONDITIONS
**
** Name: BC-1 Type: Displacement/Rotation
*Boundary
BottomFace, 2, 2
** Name: BC-2 Type: Displacement/Rotation
*Boundary
TopFace, 2, 2, -0.5
** Name: BC-3 Type: Displacement/Rotation
*Boundary
Corner1, 1, 1
Corner1, 3, 3
** Name: BC-4 Type: Displacement/Rotation
*Boundary
Corner2, 3, 3
** Name: BC-5 Type: Displacement/Rotation
*Boundary
XMIN, 1, 1
** Name: BC-6 Type: Displacement/Rotation
*Boundary
XMAX, 1, 1
** Name: BC-7 Type: Displacement/Rotation
*Boundary
ZMIN, 3, 3
** Name: BC-8 Type: Displacement/Rotation
*Boundary
ZMAX, 3, 3
**
** OUTPUT REQUESTS
**
*Restart, write, frequency=0
**
** FIELD OUTPUT: F-Output-1
**
*Output, field, variable=PRESELECT
**
** HISTORY OUTPUT: H-Output-1
**
*Output, history, variable=PRESELECT
*End Step
